dimension          2


# 1) Initialization
# -----------------
# set parameters that need to be defined before atoms are created or read-in from a file.
# e.g., units, dimension, newton, processors, boundary, atom_style, atom_modify.

# discretization
variable           dx equal 0.07853982 #--datafile

# smoothing length
variable           h equal 3.5*${dx}

# set the box
variable           zmin equal -${dx}/2.0
variable           zmax equal  ${dx}/2.0

newton             off
units              si
boundary           f f p

# atom
atom_style         isph

print              "----------------"
print              "dx = ${dx}"
print              "h = ${h}"
print              "----------------"

# 2) Atom definition
# ------------------
# 1. There are 3 ways to define atoms in LAMMPS.
# - read them in from a data or
# - restart file via the read_data or
# - read_restart commands.
# These files can contain molecular topology information.
#
# Or create atoms on a lattice (with no molecular topology).
# e.g., lattice, region, create_box, create_atoms.
# The entire set of atoms can be duplicated to make a larger simulation using the replicate command.

read_data          unit-test-compact-poisson-boundary-2d.data

# 3) Settings
# -----------
# Once atoms and molecular topology are defined, a variety of settings can be specified:
# force field coefficients, simulation parameters, output options, etc.
#
# Force field coefficients are set by these commands (they can also be set in the read-in files):
# pair_coeff, bond_coeff, angle_coeff, dihedral_coeff, improper_coeff, kspace_style,
# dielectric, special_bonds.
#
# Various simulation parameters are set by these commands:
# neighbor, neigh_modify, group, timestep, reset_timestep, run_style, min_style, min_modify.
#
# Fixes impose a variety of boundary conditions, time integration, and diagnostic options.
# The fix command comes in many flavors.
#
# Various computations can be specified for execution during a simulation using the compute,
# compute_modify, and variable commands.
#
# Output options are set by the thermo, dump, and restart commands.

neighbor           0 bin
neigh_modify       every 1 delay 0 check yes

pair_style         isph/mls
pair_coeff         * * unit-test-compact-poisson.xml ${h}

# random perturbation
#variable	    xi equal 0.05*${h}

# testing anisotropy error
#displace_atoms	   all random ${xi} ${xi} 0.0 42 units box

# 4) Run a simulation
# -------------------
# A molecular dynamics simulation is run using the run command.
# Energy minimization (molecular statics) is performed using the minimize command.
# A parallel tempering (replica-exchange) simulation can be run using the temper command.

#
timestep           0

# no need to dump out
variable           dumpfreq equal 1
dump               dump all custom ${dumpfreq} unit-test-compact-poisson-boundary-2d.dump id type x y z pressure psi psigradx psigrady type
dump_modify        dump flush yes

run                0
