dimension          2

# 1) Initialization
# -----------------
# set parameters that need to be defined before atoms are created or read-in from a file.
# e.g., units, dimension, newton, processors, boundary, atom_style, atom_modify.

# discretization
variable           dx equal 0.01395032 #--datafile

# smoothing length
variable           h  equal 0.8*${dx}
variable           hmin equal 0.8*${dx}

# flow parameters
variable           Umax equal 20

variable           tstep equal 1e4 #10000
#0.15*${dx}/${Umax}
variable           tfinal equal 0.01
variable           nrun equal 1 #${tfinal}/${tstep}

# boundary and timestep
newton             off
units              si
boundary           p p p

# skin setup; not really used
variable           delay equal 0
variable           skin equal 2.0*${delay}*${tstep}*${Umax}

# atom
atom_style         isph
atom_modify        map array		#store global array of proc ids on each proc

print              "----------------"
print              "dx = ${dx}"
print              "h = ${h}"
print              "skin = ${skin}"
print              "tstep = ${tstep}"
print              "tfinal = ${tfinal}"
print              "nrun = ${nrun}"
print              "----------------"

# 2) Atom definition
# ------------------
# 1. There are 3 ways to define atoms in LAMMPS.
# - read them in from a data or
# - restart file via the read_data or
# - read_restart commands.
# These files can contain molecular topology information.
#
# Or create atoms on a lattice (with no molecular topology).
# e.g., lattice, region, create_box, create_atoms.
# The entire set of atoms can be duplicated to make a larger simulation using the replicate command.

read_data          poiseuille-flow-steady-tilted-2d.data

# 3) Settings
# -----------
# Once atoms and molecular topology are defined, a variety of settings can be specified:
# force field coefficients, simulation parameters, output options, etc.
#
# Force field coefficients are set by these commands (they can also be set in the read-in files):
# pair_coeff, bond_coeff, angle_coeff, dihedral_coeff, improper_coeff, kspace_style,
# dielectric, special_bonds.
#
# Various simulation parameters are set by these commands:
# neighbor, neigh_modify, group, timestep, reset_timestep, run_style, min_style, min_modify.
#
# Fixes impose a variety of boundary conditions, time integration, and diagnostic options.
# The fix command comes in many flavors.
#
# Various computations can be specified for execution during a simulation using the compute,
# compute_modify, and variable commands.
#
# Output options are set by the thermo, dump, and restart commands.

neighbor           ${skin} bin
neigh_modify       every 1 delay ${delay} check yes

pair_style         isph/corrected
pair_coeff         * * poiseuille-flow-steady-tilted.xml ${h} ${hmin}
variable           theta equal 0
variable           ctheta equal 0.8660254
variable           stheta equal 0.5
variable           velx atom 50*${ctheta}*(1-(-${stheta}*x+${ctheta}*y+0.5))*(-${stheta}*x+${ctheta}*y+0.5)
variable           vely atom 50*${stheta}*(1-(-${stheta}*x+${ctheta}*y+0.5))*(-${stheta}*x+${ctheta}*y+0.5)
velocity           all set v_velx v_vely 0.0 units box


# apply fix for type 1 particles: psi field particles
fix                1 all isph
fix                2 all isph/error
# fix                3 all isph/shift 0.07

# 4) Run a simulation
# -------------------
# A molecular dynamics simulation is run using the run command.
# Energy minimization (molecular statics) is performed using the minimize command.
# A parallel tempering (replica-exchange) simulation can be run using the temper command.

#
timestep           ${tstep}

#
variable           dumpfreq equal 1

dump               dump all custom ${dumpfreq} poiseuille-flow-steady-tilted-2d.dump id type x y z vx vy pressure type psigradx psigrady
dump_modify        dump flush yes

run                1
#${nrun}
